// COMSOL Multiphysics 6.4.0.293 model "model.mph"
// Outline of the model tree

Parameters
  lambda_w = 1550[nm]  // wavelength
  theta = 30[deg]  // incident angle
  k1 = 2*pi/lambda_w
  k1x = k1*sin(theta)
  Etm = 1[V/m]
  Ete = 1[V/m]
  Etmx = Etm*cos(theta)
  Etmz = Etm*sin(theta)
  M = 2  // azimuthal number
  r_air = 1.6[um]  // radius of air sphera
  h_sub = 600[nm]
  pml = 1*lambda_w  // size of pml layer
  nu = c_const/lambda_w  // frequency
  eta = mu0_const*c_const
  cyl_h = 800[nm]  // height of cylinder
  diam_cyl = 600[nm]  // diameter of cylinder
  phi_cut = 0[rad]

Functions
  int1: Interpolation "n_GaAs"
    funcnametable = {int1, 1}
    funcname = n_m
    table = 
      {0.2066, 1.333}
      {0.2101, 1.339}
      {0.2138, 1.349}
      {0.2175, 1.366}
      {0.2214, 1.393}
      {0.2254, 1.433}
      {0.2296, 1.490}
      {0.2339, 1.567}
      {0.2384, 1.677}
      {0.2431, 1.860}
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    argunit = um
    plotfuncname = n_m
  int2: Interpolation "k_GaAs"
    funcnametable = {int2, 1}
    funcname = k_m
    table = 
      {0.2066, 2.457}
      {0.2101, 2.531}
      {0.2138, 2.600}
      {0.2175, 2.688}
      {0.2214, 2.794}
      {0.2254, 2.912}
      {0.2296, 3.049}
      {0.2339, 3.208}
      {0.2384, 3.407}
      {0.2431, 3.654}
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    argunit = um
    plotfuncname = k_m
  an1: Analytic | funcname = Kronecker; expr = if(x==y,1,0); args = {x, y}

Variables
  var1 "wavenumber"
    eps1 = 1
    eps2 = 1.01
    k1z = k1*cos(theta)
    k2z = sqrt(eps2*k1^2-k1x^2)  // true only if eps1=1
    Rtmx = (eps1*k2z-eps2*k1z)/(eps1*k2z+eps2*k1z)  // Ex_ref/Ex_inc
    Rtmz = -(eps1*k2z-eps2*k1z)/(eps1*k2z+eps2*k1z)  // Ez_ref/Ez_inc
    Ttmx = (2*eps1*k2z)/(eps1*k2z+eps2*k1z)  // Ex_tr/Ex_inc
    Ttmz = (2*eps1*k1z)/(eps1*k2z+eps2*k1z)  // Ez_tr/Ez_inc
    Rtex = -(k2z-k1z)/(k2z+k1z)
    Ttex = (2*k1z)/(k2z+k1z)
    theta0 = pi/2 - atan(z/r)
    n1 = sqrt(eps1)
    n2 = sqrt(eps2)
  var2 "background field TE"
    E1z_te = 0
    E2z_te = 0
    Ez_te = 0
    Ephi_te = E1phi_te*if(z>0,1,0)+E2phi_te*if(z>0,0,1)
    Er_te = E1r_te*if(z>0,1,0)+E2r_te*if(z>0,0,1)
    E1r_te = Ete*0.5*(-i)^(M+2)*(besselj(M+1,k1x*r)+besselj(M-1,k1x*r))*(exp(i*k1z*z)+Rtex*exp(-i*k1z*z))
    E2r_te = Ete*0.5*(-i)^(M+2)*(besselj(M+1,k1x*r)+besselj(M-1,k1x*r))*(Ttex*exp(i*k2z*z))
    E1phi_te = Ete*0.5*(-i)^(M+1)*(besselj(M+1,k1x*r)-besselj(M-1,k1x*r))*(exp(i*k1z*z)+Rtex*exp(-i*k1z*z))
    E2phi_te = Ete*0.5*(-i)^(M+1)*(besselj(M+1,k1x*r)-besselj(M-1,k1x*r))*(Ttex*exp(i*k2z*z))
  var3 "background field TM"
    Ephi_tm = E1phi_tm*if(z>0,1,0)+E2phi_tm*if(z>0,0,1)
    Er_tm = E1r_tm*if(z>0,1,0)+E2r_tm*if(z>0,0,1)
    Ez_tm = E1z_tm*if(z>0,1,0)+E2z_tm*if(z>0,0,1)
    E1phi_tm = Etmx*(-i)^(M)*(besselj(M+1,k1x*r)+besselj(M-1,k1x*r))/2*(exp(i*k1z*z)+Rtmx*exp(-i*k1z*z))
    E2phi_tm = Etmx*(-i)^(M)*(besselj(M+1,k1x*r)+besselj(M-1,k1x*r))/2*(Ttmx*exp(i*k2z*z))
    E1r_tm = Etmx*(-i)^(M+1)*(besselj(M+1,k1x*r)-besselj(M-1,k1x*r))/2*(exp(i*k1z*z)+Rtmx*exp(-i*k1z*z))
    E2r_tm = Etmx*(-i)^(M+1)*(besselj(M+1,k1x*r)-besselj(M-1,k1x*r))/2*(Ttmx*exp(i*k2z*z))
    E1z_tm = Etmz*(-i)^M*besselj(M,k1x*r)*(exp(i*k1z*z)+Rtmz*exp(-i*k1z*z))
    E2z_tm = Etmz*(-i)^M*besselj(M,k1x*r)*(Ttmz*exp(i*k2z*z))
  var4 "current"
    kr = k1 * (r^2 +z^2)^(1/2)
    j0 = (sin(kr))/kr
    j1 = (sin(kr) - kr* cos(kr))/ (kr)^2
    j2 = (3-kr^2)/kr^3 * sin(kr) - 3*cos(kr)/kr^2
    j3 = (kr^2 - 15)*cos(kr)/kr^3 - 3/kr^4*(2*kr^2 - 5)*sin(kr)
    j4 = 5*(2*kr^2-21)/kr^4*cos(kr) + sin(kr)/kr^5 *(kr^4 - 45*kr^2+105)
    j5 = (15* (kr^4 - 28 *kr^2 + 63) *sin(kr))/kr^6 + ((-kr^4 + 105* kr^2 - 945) *cos(kr))/kr^5
    Jro_tm = i*(2*pi*c_const/lambda_w) * ewfd.Pr
    Jphi_tm = i*(2*pi*c_const/lambda_w) * ewfd.Pphi
    Jz_tm = i*(2*pi*c_const/lambda_w) * ewfd.Pz
    Jro_te = i*(2*pi*c_const/lambda_w) * ewfd2.Pr
    Jphi_te = i*(2*pi*c_const/lambda_w)*ewfd2.Pphi
    Jz_te = i*(2*pi*c_const/lambda_w)*ewfd2.Pz
    J1_te = (cos(phi)-i*sin(phi))/sqrt(2)*(-Jro_te+i*Jphi_te)
    J1_tm = (cos(phi)-i*sin(phi))/sqrt(2)*(-Jro_tm+i*Jphi_tm)
    J0_te = Jz_te
    J0_tm = Jz_tm
    Jm1_te = (cos(phi)+i*sin(phi))/sqrt(2)*(Jro_te+i*Jphi_te)
    Jm1_tm = (cos(phi)+i*sin(phi))/sqrt(2)*(Jro_tm+i*Jphi_tm)
    r1 = -(cos(phi)-i*sin(phi))/sqrt(2)*r
    r0 = z
    rm1 = (cos(phi)+i*sin(phi))/sqrt(2)*r
    t = vol(1)
  var5 "EL DIPOLE"
    a10_te = int(2 *pi* r *((j0* Jz_te* k1^2)/(sqrt(6)* pi))*(1/(2 *sqrt(pi)))+(j2* k1^2 *r* (Jz_te+3* Jz_te* cos(2 *theta0)+3 *Jro_te* sin(2* theta0)))/(4 *sqrt(6 *pi)))*Kronecker(M,0)*2*pi
    a10_tm = int(2 *pi* r *((j0* Jz_tm* k1^2)/(sqrt(6)* pi))*(1/(2 *sqrt(pi)))+(j2* k1^2 *r* (Jz_tm+3* Jz_tm* cos(2 *theta0)+3 *Jro_tm* sin(2* theta0)))/(4 *sqrt(6 *pi)))*Kronecker(M,0)*2*pi
    a11_te = int(2* pi* r* ((j0 *(i *Jphi_te+Jro_te) *k1^2)/(2* sqrt(3)* pi))*(1/(2 *sqrt(pi)))+(j2* k1^2 *r* (-2 *i *Jphi_te+Jro_te-3* Jro_te* cos(2 *theta0)+3 *Jz_te *sin(2 *theta0)))/(8* sqrt(3 *pi)))*Kronecker(M,1)*2*pi
    a11_tm = int(2* pi* r* ((j0 *(i *Jphi_tm+Jro_tm) *k1^2)/(2* sqrt(3)* pi))*(1/(2 *sqrt(pi)))+(j2* k1^2 *r* (-2 *i *Jphi_tm+Jro_tm-3* Jro_tm* cos(2 *theta0)+3 *Jz_tm *sin(2 *theta0)))/(8* sqrt(3 *pi)))*Kronecker(M,1)*2*pi
    a1m1_te = int(2 *pi* r* ((i* j0* (Jphi_te+i* Jro_te)* k1^2)/(2* sqrt(3)* pi))*(1/(2* sqrt(pi)))+(j2* k1^2 *r* (-2* i* Jphi_te-Jro_te+3 *Jro_te* cos(2 *theta0)-3* Jz_te *sin(2* theta0)))/(8* sqrt(3 *pi)))*Kronecker(M,-1)*2*pi
    a1m1_tm = int(2 *pi* r* ((i* j0* (Jphi_tm+i* Jro_tm)* k1^2)/(2* sqrt(3)* pi))*(1/(2* sqrt(pi)))+(j2* k1^2 *r* (-2* i* Jphi_tm-Jro_tm+3 *Jro_tm* cos(2 *theta0)-3* Jz_tm *sin(2* theta0)))/(8* sqrt(3 *pi)))*Kronecker(M,-1)*2*pi
  var6 "EL QUADROPOLE"
    a20_te = int(-(1/8)* k1^2 *sqrt(3/(10 *pi)) *r* ((8* j1+3 *j3) *Jz_te *cos(theta0)+5 *j3 *Jz_te *cos(3 *theta0)+2 *Jro_te *(-2 *j1+3 *j3+5 *j3* cos(2 *theta0))* sin(theta0)))*Kronecker(M,0)*2*pi
    a20_tm = int(-(1/8)* k1^2 *sqrt(3/(10 *pi)) *r* ((8* j1+3 *j3) *Jz_tm *cos(theta0)+5 *j3 *Jz_tm *cos(3 *theta0)+2 *Jro_tm *(-2 *j1+3 *j3+5 *j3* cos(2 *theta0))* sin(theta0)))*Kronecker(M,0)*2*pi
    a22_te = int((k1^2 *r *sin(theta0) *(-6 *i* j1* Jphi_te+4* i* j3 *Jphi_te-6 *j1 *Jro_te-j3 *Jro_te+5* j3* Jro_te* cos(2 *theta0)-5 *j3* Jz_te* sin(2 *theta0)))/(8* sqrt(5*pi)))*Kronecker(M,2)*2*pi
    a22_tm = int((k1^2 *r *sin(theta0) *(-6 *i* j1* Jphi_tm+4* i* j3 *Jphi_tm-6 *j1 *Jro_tm-j3 *Jro_tm+5* j3* Jro_tm* cos(2 *theta0)-5 *j3* Jz_tm* sin(2 *theta0)))/(8* sqrt(5*pi)))*Kronecker(M,2)*2*pi
    a21_te = int((k1^2 *r *((-6* i* j1* Jphi_te+4 *i *j3 *Jphi_te-6 *j1 *Jro_te-j3 *Jro_te)* cos(theta0)+5* j3* Jro_te *cos(3*theta0)-2 *Jz_te* (3* (j1+j3)+5 *j3* cos(2* theta0)) *sin(theta0)))/(8 *sqrt(5 *pi)))*Kronecker(M,1)*2*pi
    a21_tm = int((k1^2 *r *((-6* i* j1* Jphi_tm+4 *i *j3 *Jphi_tm-6 *j1 *Jro_tm-j3 *Jro_tm)* cos(theta0)+5* j3* Jro_tm *cos(3*theta0)-2 *Jz_tm* (3* (j1+j3)+5 *j3* cos(2* theta0)) *sin(theta0)))/(8 *sqrt(5 *pi)))*Kronecker(M,1)*2*pi
    a2m1_te = int((k1^2 * r* ((6* j1* (-i* Jphi_te+Jro_te)+j3* (4* i *Jphi_te+Jro_te)) *cos(theta0)-5* j3* Jro_te *cos(3 *theta0)+2* Jz_te* (3* (j1+j3)+5* j3* cos(2* theta0)) *sin(theta0)))/(8* sqrt(5 *pi)))*Kronecker(M,-1)*2*pi
    a2m1_tm = int((k1^2 * r* ((6* j1* (-i* Jphi_tm+Jro_tm)+j3* (4* i *Jphi_tm+Jro_tm)) *cos(theta0)-5* j3* Jro_tm *cos(3 *theta0)+2* Jz_tm* (3* (j1+j3)+5* j3* cos(2* theta0)) *sin(theta0)))/(8* sqrt(5 *pi)))*Kronecker(M,-1)*2*pi
    a2m2_te = int((k1^2 *r* sin(theta0) *(6 *i* j1* Jphi_te-4* i* j3* Jphi_te-6* j1* Jro_te-j3 *Jro_te+5 *j3* Jro_te* cos(2 *theta0)-5 *j3* Jz_te *sin(2 *theta0)))/(8* sqrt(5 *pi)))*Kronecker(M,-2)*2*pi
    a2m2_tm = int((k1^2 *r* sin(theta0) *(6 *i* j1* Jphi_tm-4* i* j3* Jphi_tm-6* j1* Jro_tm-j3 *Jro_tm+5 *j3* Jro_tm* cos(2 *theta0)-5 *j3* Jz_tm *sin(2 *theta0)))/(8* sqrt(5 *pi)))*Kronecker(M,-2)*2*pi
  var7 "EL OCTOPOLE"
    a31_te = int((1/(128 *sqrt(7 *pi)))*k1^2 *r* (16 *j2 *(3* i* Jphi_te+Jro_te)+9 *j4* (-4 *i* Jphi_te+Jro_te)+4 *(5* i* (4 *j2-3* j4)* Jphi_te+28* j2* Jro_te) *cos(2 *theta0)-105 *j4 *Jro_te *cos(4 *theta0)+2* Jz_te* (64* j2+15* j4+105* j4* cos(2 *theta0))* sin(2 *theta0)))*Kronecker(M,1)*2*pi
    a31_tm = int((1/(128 *sqrt(7 *pi)))*k1^2 *r* (16 *j2 *(3* i* Jphi_tm+Jro_tm)+9 *j4* (-4 *i* Jphi_tm+Jro_tm)+4 *(5* i* (4 *j2-3* j4)* Jphi_tm+28* j2* Jro_tm) *cos(2 *theta0)-105 *j4 *Jro_tm *cos(4 *theta0)+2* Jz_tm* (64* j2+15* j4+105* j4* cos(2 *theta0))* sin(2 *theta0)))*Kronecker(M,1)*2*pi
    a3m1_te = int((1/(128 *sqrt(7 *pi)))*k1^2 *r* (48 *i *j2* Jphi_te-36* i* j4* Jphi_te-16* j2* Jro_te-9* j4* Jro_te+4 *i* (-15* j4* Jphi_te+4* j2 *(5 *Jphi_te+7* i *Jro_te)) *cos(2 *theta0)+105 *j4 *Jro_te* cos(4* theta0)-2* Jz_te* (64* j2+15* j4+105* j4* cos(2 *theta0))* sin(2 *theta0)))*Kronecker(M,-1)*2*pi
    a3m1_tm = int((1/(128 *sqrt(7 *pi)))*k1^2 *r* (48 *i *j2* Jphi_tm-36* i* j4* Jphi_tm-16* j2* Jro_tm-9* j4* Jro_tm+4 *i* (-15* j4* Jphi_tm+4* j2 *(5 *Jphi_tm+7* i *Jro_tm)) *cos(2 *theta0)+105 *j4 *Jro_tm* cos(4* theta0)-2* Jz_tm* (64* j2+15* j4+105* j4* cos(2 *theta0))* sin(2 *theta0)))*Kronecker(M,-1)*2*pi
    a33_te = int(1/32* k1^2 *sqrt(15/(7 *pi)) *r *sin(theta0)^2 *(8* i* j2 *Jphi_te-6* i* j4* Jphi_te+8 *j2* Jro_te+j4 *Jro_te-7* j4* Jro_te* cos(2 *theta0)+7* j4* Jz_te* sin(2 *theta0)))*Kronecker(M,3)*2*pi
    a3m3_te = int(1/32 *k1^2 *sqrt(15/(7 *pi))* r* sin(theta0)^2 *(8 *i* j2* Jphi_te-6* i* j4 *Jphi_te-8 *j2* Jro_te-j4* Jro_te+7 *j4* Jro_te* cos(2 *theta0)-7 *j4* Jz_te* sin(2*theta)))*Kronecker(M,-3)*2*pi
    a33_tm = int(1/32* k1^2 *sqrt(15/(7 *pi)) *r *sin(theta0)^2 *(8* i* j2 *Jphi_tm-6* i* j4* Jphi_tm+8 *j2* Jro_tm+j4 *Jro_tm-7* j4* Jro_tm* cos(2 *theta0)+7* j4* Jz_tm* sin(2 *theta0)))*Kronecker(M,3)*2*pi
    a3m3_tm = int(1/32 *k1^2 *sqrt(15/(7 *pi))* r* sin(theta0)^2 *(8 *i* j2* Jphi_tm-6* i* j4 *Jphi_tm-8 *j2* Jro_tm-j4* Jro_tm+7 *j4* Jro_tm* cos(2 *theta0)-7 *j4* Jz_tm* sin(2*theta)))*Kronecker(M,-3)*2*pi
    a32_te = int(1/32* k1^2 *sqrt(5/(14*pi))* r* sin(theta0) *((-24* i* j4* Jphi_te-3* j4* Jro_te+32 *j2* (i *Jphi_te+Jro_te))* cos(theta0)-21* j4* Jro_te* cos(3 *theta0)+2 *Jz_te* (8* j2+15 *j4+21* j4* cos(2 *theta0))* sin(theta0)))*Kronecker(M,2)*2*pi
    a3m2_te = int(1/32* k1^2 *sqrt(5/(14 *pi))* r* sin(theta0)* ((24* i* j4 *Jphi_te-3 *j4* Jro_te+32 *j2 *(-i* Jphi_te+Jro_te)) *cos(theta0)-21 *j4 *Jro_te* cos(3*theta0)+2* Jz_te* (8* j2+15 *j4+21* j4* cos(2*theta0)) *sin(theta0)))*Kronecker(M,-2)*2*pi
    a32_tm = int(1/32* k1^2 *sqrt(5/(14*pi))* r* sin(theta0) *((-24* i* j4* Jphi_tm-3* j4* Jro_tm+32 *j2* (i *Jphi_tm+Jro_tm))* cos(theta0)-21* j4* Jro_tm* cos(3 *theta0)+2 *Jz_tm* (8* j2+15 *j4+21* j4* cos(2 *theta0))* sin(theta0)))*Kronecker(M,2)*2*pi
    a3m2_tm = int(1/32* k1^2 *sqrt(5/(14 *pi))* r* sin(theta0)* ((24* i* j4 *Jphi_tm-3 *j4* Jro_tm+32 *j2 *(-i* Jphi_tm+Jro_tm)) *cos(theta0)-21 *j4 *Jro_tm* cos(3*theta0)+2* Jz_tm* (8* j2+15 *j4+21* j4* cos(2*theta0)) *sin(theta0)))*Kronecker(M,-2)*2*pi
    a30_te = int(1/64 *k1^2 *sqrt(3/(7 *pi))* r* (16* j2* Jz_te+9 *j4* Jz_te+4 *(12 *j2+5 *j4) *Jz_te *cos(2 *theta0)+35* j4* Jz_te* cos(4 *theta0)-32 *j2* Jro_te* sin(2* theta0)+10 *j4* Jro_te* sin(2 *theta0)+35 *j4* Jro_te *sin(4*theta0)))*Kronecker(M,0)*2*pi
    a30_tm = int(1/64 *k1^2 *sqrt(3/(7 *pi))* r* (16* j2* Jz_tm+9 *j4* Jz_tm+4 *(12 *j2+5 *j4) *Jz_tm *cos(2 *theta0)+35* j4* Jz_tm* cos(4 *theta0)-32 *j2* Jro_tm* sin(2* theta0)+10 *j4* Jro_tm* sin(2 *theta0)+35 *j4* Jro_tm *sin(4*theta0)))*Kronecker(M,0)*2*pi
  var8 "EL 4-th order multipole"
    a4m4_te = int(1/48* k1^2 *sqrt(7/(2 *pi))* r* sin(theta0)^3 *(10* i* j3* Jphi_te-8* i* j5* Jphi_te-10* j3* Jro_te-j5* Jro_te+9* j5* Jro_te *cos(2 *theta0)-9* j5* Jz_te *sin(2 *theta0)))*Kronecker(M,-4)*2*pi
    a4m4_tm = int(1/48* k1^2 *sqrt(7/(2 *pi))* r* sin(theta0)^3 *(10* i* j3* Jphi_tm-8* i* j5* Jphi_tm-10* j3* Jro_tm-j5* Jro_tm+9* j5* Jro_tm *cos(2 *theta0)-9* j5* Jz_tm *sin(2 *theta0)))*Kronecker(M,-4)*2*pi
    a4m3_te = int(1/48 *k1^2 *sqrt(7/pi)* r* sin(theta0)^2 *(3* (4 *i* j5* Jphi_te-j5* Jro_te+5 *j3 *(-i* Jphi_te+Jro_te)) *cos(theta0)-9 *j5 *Jro_te *cos(3 *theta0)+Jz_te *(5 *j3+14 *j5+18 *j5 *cos(2 *theta0))* sin(theta0)))*Kronecker(M,-3)*2*pi
    a4m3_tm = int(1/48 *k1^2 *sqrt(7/pi)* r* sin(theta0)^2 *(3* (4 *i* j5* Jphi_tm-j5* Jro_tm+5 *j3 *(-i* Jphi_tm+Jro_tm)) *cos(theta0)-9 *j5 *Jro_tm *cos(3 *theta0)+Jz_tm *(5 *j3+14 *j5+18 *j5 *cos(2 *theta0))* sin(theta0)))*Kronecker(M,-3)*2*pi
    a4m2_te = int((1/(96 *sqrt(2 *pi)))*k1^2 *r *sin(theta0)* (50 *i* j3* Jphi_te-40 *i* j5* Jphi_te-40 *j3* Jro_te+5 *j5* Jro_te+(j3* (70* i *Jphi_te-80* Jro_te)+28 *j5 *(-2* i* Jphi_te+Jro_te))* cos(2 *theta0)+63* j5* Jro_te* cos(4 *theta0)-60* j3* Jz_te* sin(2 *theta0)-42* j5* Jz_te* sin(2 *theta0)-63* j5* Jz_te *sin(4 *theta0)))*Kronecker(M,-2)*2*pi
    a4m2_tm = int((1/(96 *sqrt(2 *pi)))*k1^2 *r *sin(theta0)* (50 *i* j3* Jphi_tm-40 *i* j5* Jphi_tm-40 *j3* Jro_tm+5 *j5* Jro_tm+(j3* (70* i *Jphi_tm-80* Jro_tm)+28 *j5 *(-2* i* Jphi_tm+Jro_tm))* cos(2 *theta0)+63* j5* Jro_tm* cos(4 *theta0)-60* j3* Jz_tm* sin(2 *theta0)-42* j5* Jz_tm* sin(2 *theta0)-63* j5* Jz_tm *sin(4 *theta0)))*Kronecker(M,-2)*2*pi
    a4m1_te = int((1/(192* sqrt(pi)))*k1^2* r* (3* (5* j3* (-3* i* Jphi_te+Jro_te)+2 *j5* (6* i* Jphi_te+Jro_te)) *cos(theta0)+(-35* i* j3* Jphi_te+28* i* j5* Jphi_te+65 *j3* Jro_te-7 *j5* Jro_te) *cos(3 *theta0)-63* j5* Jro_te* cos(5 *theta0)+15* j3* Jz_te* sin(theta0)+6* j5* Jz_te* sin(theta0)+75 *j3* Jz_te *sin(3* theta0)+21 *j5* Jz_te* sin(3 *theta0)+63 *j5* Jz_te* sin(5 *theta0)))*Kronecker(M,-1)*2*pi
    a4m1_tm = int((1/(192* sqrt(pi)))*k1^2* r* (3* (5* j3* (-3* i* Jphi_tm+Jro_tm)+2 *j5* (6* i* Jphi_tm+Jro_tm)) *cos(theta0)+(-35* i* j3* Jphi_tm+28* i* j5* Jphi_tm+65 *j3* Jro_tm-7 *j5* Jro_tm) *cos(3 *theta0)-63* j5* Jro_tm* cos(5 *theta0)+15* j3* Jz_tm* sin(theta0)+6* j5* Jz_tm* sin(theta0)+75 *j3* Jz_tm *sin(3* theta0)+21 *j5* Jz_tm* sin(3 *theta0)+63 *j5* Jz_tm* sin(5 *theta0)))*Kronecker(M,-1)*2*pi
    a40_te = int(-(1/384) *k1^2 *sqrt(5/pi) *r* (6* (8* j3+5 *j5) *Jz_te* cos(theta0)+5* (16 *j3+7 *j5) *Jz_te* cos(3 *theta0)+63* j5* Jz_te* cos(5 *theta0)+3* Jro_te* ((-4* j3+2 *j5)* sin(theta0)+(-20* j3+7* j5) *sin(3 *theta0)+21 *j5* sin(5 *theta0))))*Kronecker(M,0)*2*pi
    a40_tm = int(-(1/384) *k1^2 *sqrt(5/pi) *r* (6* (8* j3+5 *j5) *Jz_tm* cos(theta0)+5* (16 *j3+7 *j5) *Jz_tm* cos(3 *theta0)+63* j5* Jz_tm* cos(5 *theta0)+3* Jro_tm* ((-4* j3+2 *j5)* sin(theta0)+(-20* j3+7* j5) *sin(3 *theta0)+21 *j5* sin(5 *theta0))))*Kronecker(M,0)*2*pi
    a41_te = int((1/(192* sqrt(pi)))*k1^2* r* (3* (5* j3* (-3* i* Jphi_te-Jro_te)+2 *j5* (6* i* Jphi_te-Jro_te)) *cos(theta0)+(-35* i* j3* Jphi_te+28* i* j5* Jphi_te-65 *j3* Jro_te+7 *j5* Jro_te) *cos(3 *theta0)+63* j5* Jro_te* cos(5 *theta0)-15* j3* Jz_te* sin(theta0)-6* j5* Jz_te* sin(theta0)-75 *j3* Jz_te *sin(3* theta0)-21 *j5* Jz_te* sin(3 *theta0)-63 *j5* Jz_te* sin(5 *theta0)))*Kronecker(M,1)*2*pi
    a41_tm = int((1/(192* sqrt(pi)))*k1^2* r* (3* (5* j3* (-3* i* Jphi_tm-Jro_tm)+2 *j5* (6* i* Jphi_tm-Jro_tm)) *cos(theta0)+(-35* i* j3* Jphi_tm+28* i* j5* Jphi_tm-65 *j3* Jro_tm+7 *j5* Jro_tm) *cos(3 *theta0)+63* j5* Jro_tm* cos(5 *theta0)-15* j3* Jz_tm* sin(theta0)-6* j5* Jz_tm* sin(theta0)-75 *j3* Jz_tm *sin(3* theta0)-21 *j5* Jz_tm* sin(3 *theta0)-63 *j5* Jz_tm* sin(5 *theta0)))*Kronecker(M,1)*2*pi
    a42_te = int((1/(96 *sqrt(2 *pi)))*k1^2 *r *sin(theta0)* (-50 *i* j3* Jphi_te+40 *i* j5* Jphi_te-40 *j3* Jro_te+5 *j5* Jro_te+(j3* (-70* i *Jphi_te-80* Jro_te)+28 *j5 *(2* i* Jphi_te+Jro_te))* cos(2 *theta0)+63* j5* Jro_te* cos(4 *theta0)-60* j3* Jz_te* sin(2 *theta0)-42* j5* Jz_te* sin(2 *theta0)-63* j5* Jz_te *sin(4 *theta0)))*Kronecker(M,2)*2*pi
    a42_tm = int((1/(96 *sqrt(2 *pi)))*k1^2 *r *sin(theta0)* (-50 *i* j3* Jphi_tm+40 *i* j5* Jphi_tm-40 *j3* Jro_tm+5 *j5* Jro_tm+(j3* (-70* i *Jphi_tm-80* Jro_tm)+28 *j5 *(2* i* Jphi_tm+Jro_tm))* cos(2 *theta0)+63* j5* Jro_tm* cos(4 *theta0)-60* j3* Jz_tm* sin(2 *theta0)-42* j5* Jz_tm* sin(2 *theta0)-63* j5* Jz_tm *sin(4 *theta0)))*Kronecker(M,2)*2*pi
    a43_te = int(1/48 *k1^2 *sqrt(7/pi)* r* sin(theta0)^2 *(3* (-5* i* j3* Jphi_te+4* i* j5 *Jphi_te-5 *j3 *Jro_te+j5* Jro_te)* cos(theta0)+9 *j5* Jro_te *cos(3 *theta0)-5 *(j3+j5)* Jz_te *sin(theta0)-9 *j5 *Jz_te* sin(3 *theta0)))*Kronecker(M,3)*2*pi
    a43_tm = int(1/48 *k1^2 *sqrt(7/pi)* r* sin(theta0)^2 *(3* (-5* i* j3* Jphi_tm+4* i* j5 *Jphi_tm-5 *j3 *Jro_tm+j5* Jro_tm)* cos(theta0)+9 *j5* Jro_tm *cos(3 *theta0)-5 *(j3+j5)* Jz_tm *sin(theta0)-9 *j5 *Jz_tm* sin(3 *theta0)))*Kronecker(M,3)*2*pi
    a44_te = int(1/48 *k1^2 *sqrt(7/(2 *pi)) *r* sin(theta0)^3* (-10 *i* j3 *Jphi_te+8* i* j5* Jphi_te-10 *j3 *Jro_te-j5* Jro_te+9* j5* Jro_te* cos(2*theta0)-9* j5* Jz_te* sin(2*theta0)))*Kronecker(M,4)*2*pi
    a44_tm = int(1/48 *k1^2 *sqrt(7/(2 *pi)) *r* sin(theta0)^3* (-10 *i* j3 *Jphi_tm+8* i* j5* Jphi_tm-10 *j3 *Jro_tm-j5* Jro_tm+9* j5* Jro_tm* cos(2*theta0)-9* j5* Jz_tm* sin(2*theta0)))*Kronecker(M,4)*2*pi
  var9 "MG DIPOLE"
    b10_te = int(-(1/2)* i* j1* Jphi_te *k1^2 *sqrt(3/(2 *pi))* r *sin(theta0))*Kronecker(M,0)*2*pi
    b10_tm = int(-(1/2)* i* j1* Jphi_tm *k1^2 *sqrt(3/(2 *pi))* r *sin(theta0))*Kronecker(M,0)*2*pi
    b11_te = int(1/4 *j1 *k1^2* sqrt(3/pi)* r* ((i* Jphi_te+Jro_te)* cos(theta0)-Jz_te* sin(theta0)))*Kronecker(M,1)*2*pi
    b11_tm = int(1/4 *j1 *k1^2* sqrt(3/pi)* r* ((i* Jphi_tm+Jro_tm)* cos(theta0)-Jz_tm* sin(theta0)))*Kronecker(M,1)*2*pi
    b1m1_te = int(1/4* j1 *k1^2* sqrt(3/pi)* r* ((-i* Jphi_te+Jro_te)* cos(theta0)-Jz_te* sin(theta0)))*Kronecker(M,-1)*2*pi
    b1m1_tm = int(1/4* j1 *k1^2* sqrt(3/pi)* r* ((-i* Jphi_tm+Jro_tm)* cos(theta0)-Jz_tm* sin(theta0)))*Kronecker(M,-1)*2*pi
  var10 "MG QUADROPOLE"
    b20_te = int(1/2* i* j2* Jphi_te* k1^2* sqrt(15/(2*pi))* r *cos(theta0)* sin(theta0))*Kronecker(M,0)*2*pi
    b20_tm = int(1/2* i* j2* Jphi_tm* k1^2* sqrt(15/(2*pi))* r *cos(theta0)* sin(theta0))*Kronecker(M,0)*2*pi
    b22_te = int(1/4* j2* k1^2 *sqrt(5/pi)* r* sin(theta0) *((-i* Jphi_te-Jro_te)* cos(theta0)+Jz_te* sin(theta0)))*Kronecker(M,2)*2*pi
    b22_tm = int(1/4* j2* k1^2 *sqrt(5/pi)* r* sin(theta0) *((-i* Jphi_tm-Jro_tm)* cos(theta0)+Jz_tm* sin(theta0)))*Kronecker(M,2)*2*pi
    b21_te = int(-(1/8)* j2* k1^2 *sqrt(5/pi)* r* (Jro_te+(2* i* Jphi_te+Jro_te)* cos(2 *theta0)-Jz_te* sin(2 *theta0)))*Kronecker(M,1)*2*pi
    b21_tm = int(-(1/8)* j2* k1^2 *sqrt(5/pi)* r* (Jro_tm+(2* i* Jphi_tm+Jro_tm)* cos(2 *theta0)-Jz_tm* sin(2 *theta0)))*Kronecker(M,1)*2*pi
    b2m2_te = int(1/4* j2 *k1^2 *sqrt(5/pi)* r* sin(theta0) *((-i* Jphi_te+Jro_te) *cos(theta0)-Jz_te* sin(theta0)))*Kronecker(M,-2)*2*pi
    b2m2_tm = int(1/4* j2 *k1^2 *sqrt(5/pi)* r* sin(theta0) *((-i* Jphi_tm+Jro_tm) *cos(theta0)-Jz_tm* sin(theta0)))*Kronecker(M,-2)*2*pi
    b2m1_te = int(-(1/8)* j2* k1^2 *sqrt(5/pi)*r *(Jro_te+(-2* i* Jphi_te+Jro_te)* cos(2 *theta0)-Jz_te* sin(2* theta0)))*Kronecker(M,-1)*2*pi
    b2m1_tm = int(-(1/8)* j2* k1^2 *sqrt(5/pi)*r *(Jro_tm+(-2* i* Jphi_tm+Jro_tm)* cos(2 *theta0)-Jz_tm* sin(2* theta0)))*Kronecker(M,-1)*2*pi
  var11 "MG OCTOPOLE"
    b30_te = int(-(1/16)* i* j3* Jphi_te* k1^2 *sqrt(21/pi)* r* (3+5* cos(2 *theta0)) *sin(theta0))*Kronecker(M,0)*2*pi
    b30_tm = int(-(1/16)* i* j3* Jphi_tm* k1^2 *sqrt(21/pi)* r* (3+5* cos(2 *theta0)) *sin(theta0))*Kronecker(M,0)*2*pi
    b33_te = int(1/16 *j3* k1^2* sqrt(105/pi)* r* sin(theta0)^2 *((i* Jphi_te+Jro_te) *cos(theta0)-Jz_te* sin(theta0)))*Kronecker(M,3)*2*pi
    b33_tm = int(1/16 *j3* k1^2* sqrt(105/pi)* r* sin(theta0)^2 *((i* Jphi_tm+Jro_tm) *cos(theta0)-Jz_tm* sin(theta0)))*Kronecker(M,3)*2*pi
    b32_te = int(1/16* j3* k1^2 *sqrt(35/(2 *pi))* r* sin(theta0) *(i* Jphi_te+2* Jro_te+(3* i* Jphi_te+2 *Jro_te) *cos(2 *theta0)-2 *Jz_te* sin(2*theta0)))*Kronecker(M,2)*2*pi
    b32_tm = int(1/16* j3* k1^2 *sqrt(35/(2 *pi))* r* sin(theta0) *(i* Jphi_tm+2* Jro_tm+(3* i* Jphi_tm+2 *Jro_tm) *cos(2 *theta0)-2 *Jz_tm* sin(2*theta0)))*Kronecker(M,2)*2*pi
    b31_te = int(1/64 *j3 *k1^2* sqrt(7/pi)* r* ((i* Jphi_te+11* Jro_te)* cos(theta0)+5* (3* i* Jphi_te+Jro_te)* cos(3 *theta0)-Jz_te* (sin(theta0)+5 *sin(3*theta0))))*Kronecker(M,1)*2*pi
    b31_tm = int(1/64 *j3 *k1^2* sqrt(7/pi)* r* ((i* Jphi_tm+11* Jro_tm)* cos(theta0)+5* (3* i* Jphi_tm+Jro_tm)* cos(3 *theta0)-Jz_tm* (sin(theta0)+5 *sin(3*theta0))))*Kronecker(M,1)*2*pi
    b3m1_te = int(1/64 *j3 *k1^2* sqrt(7/pi)* r* ((-i* Jphi_te+11* Jro_te)* cos(theta0)+5* (-3* i* Jphi_te+Jro_te)* cos(3 *theta0)-Jz_te* (sin(theta0)+5 *sin(3*theta0))))*Kronecker(M,-1)*2*pi
    b3m1_tm = int(1/64 *j3 *k1^2* sqrt(7/pi)* r* ((-i* Jphi_tm+11* Jro_tm)* cos(theta0)+5* (-3* i* Jphi_tm+Jro_tm)* cos(3 *theta0)-Jz_tm* (sin(theta0)+5 *sin(3*theta0))))*Kronecker(M,-1)*2*pi
    b3m2_te = int(1/16* j3* k1^2 *sqrt(35/(2 *pi))* r* sin(theta0) *(i* Jphi_te-2* Jro_te+(3* i* Jphi_te-2 *Jro_te) *cos(2 *theta0)+2 *Jz_te* sin(2*theta0)))*Kronecker(M,-2)*2*pi
    b3m2_tm = int(1/16* j3* k1^2 *sqrt(35/(2 *pi))* r* sin(theta0) *(i* Jphi_tm-2* Jro_tm+(3* i* Jphi_tm-2 *Jro_tm) *cos(2 *theta0)+2 *Jz_tm* sin(2*theta0)))*Kronecker(M,-2)*2*pi
    b3m3_te = int(1/16 *j3* k1^2* sqrt(105/pi)* r* sin(theta0)^2 *((-i* Jphi_te+Jro_te) *cos(theta0)-Jz_te* sin(theta0)))*Kronecker(M,-3)*2*pi
    b3m3_tm = int(1/16 *j3* k1^2* sqrt(105/pi)* r* sin(theta0)^2 *((-i* Jphi_tm+Jro_tm) *cos(theta0)-Jz_tm* sin(theta0)))*Kronecker(M,-3)*2*pi
  var12 "MG 4-th order multipole"
    b4m4_te = int(3/8* j4* k1^2 *sqrt(7/(2 *pi))* r* sin(theta0)^3 *((-i *Jphi_te+Jro_te)* cos(theta0)-Jz_te* sin(theta0)))*Kronecker(M,-4)*2*pi
    b4m4_tm = int(3/8* j4* k1^2 *sqrt(7/(2 *pi))* r* sin(theta0)^3 *((-i *Jphi_tm+Jro_tm)* cos(theta0)-Jz_tm* sin(theta0)))*Kronecker(M,-4)*2*pi
    b4m3_te = int(3/32* j4* k1^2 *sqrt(7/pi)* r* sin(theta0)^2 *(2 *i *Jphi_te-3 *Jro_te+(4 *i *Jphi_te-3* Jro_te) *cos(2 *theta0)+3 *Jz_te* sin(2* theta0)))*Kronecker(M,-3)*2*pi
    b4m3_tm = int(3/32* j4* k1^2 *sqrt(7/pi)* r* sin(theta0)^2 *(2 *i *Jphi_tm-3 *Jro_tm+(4 *i *Jphi_tm-3* Jro_tm) *cos(2 *theta0)+3 *Jz_tm* sin(2* theta0)))*Kronecker(M,-3)*2*pi
    b4m2_te = int(-((3 *j4* k1^2* r* sin(theta0) *((10* i* Jphi_te-17 *Jro_te)* cos(theta0)+(14* i* Jphi_te-7 *Jro_te)* cos(3 *theta0)+Jz_te* (3 *sin(theta0)+7 *sin(3 *theta0))))/(32 *sqrt(2 *pi))))*Kronecker(M,-2)*2*pi
    b4m2_tm = int(-((3 *j4* k1^2* r* sin(theta0) *((10* i* Jphi_tm-17 *Jro_tm)* cos(theta0)+(14* i* Jphi_tm-7 *Jro_tm)* cos(3 *theta0)+Jz_tm* (3 *sin(theta0)+7 *sin(3 *theta0))))/(32 *sqrt(2 *pi))))*Kronecker(M,-2)*2*pi
    b4m1_te = int(-((3* j4* k1^2 *r* (9* Jro_te+4* (-i* Jphi_te+4 *Jro_te)* cos(2 *theta0)+7* (-4 *i* Jphi_te+Jro_te) *cos(4 *theta0)-2 *Jz_te* sin(2 *theta0)-7* Jz_te* sin(4 *theta0)))/(128* sqrt(pi))))*Kronecker(M,-1)*2*pi
    b4m1_tm = int(-((3* j4* k1^2 *r* (9* Jro_tm+4* (-i* Jphi_tm+4 *Jro_tm)* cos(2 *theta0)+7* (-4 *i* Jphi_tm+Jro_tm) *cos(4 *theta0)-2 *Jz_tm* sin(2 *theta0)-7* Jz_tm* sin(4 *theta0)))/(128* sqrt(pi))))*Kronecker(M,-1)*2*pi
    b40_te = int(3/64 *i *j4 *Jphi_te* k1^2 *sqrt(5/pi)* r* (2* sin(2 *theta0)+7* sin(4*theta0)))*Kronecker(M,0)*2*pi
    b40_tm = int(3/64 *i *j4 *Jphi_tm* k1^2 *sqrt(5/pi)* r* (2* sin(2 *theta0)+7* sin(4*theta0)))*Kronecker(M,0)*2*pi
    b41_te = int(-((3* j4* k1^2 *r* (9* Jro_te+4* (i* Jphi_te+4 *Jro_te)* cos(2 *theta0)+7* (4 *i* Jphi_te+Jro_te) *cos(4 *theta0)-2 *Jz_te* sin(2 *theta0)-7* Jz_te* sin(4 *theta0)))/(128* sqrt(pi))))*Kronecker(M,1)*2*pi
    b41_tm = int(-((3* j4* k1^2 *r* (9* Jro_tm+4* (i* Jphi_tm+4 *Jro_tm)* cos(2 *theta0)+7* (4 *i* Jphi_tm+Jro_tm) *cos(4 *theta0)-2 *Jz_tm* sin(2 *theta0)-7* Jz_tm* sin(4 *theta0)))/(128* sqrt(pi))))*Kronecker(M,1)*2*pi
    b42_te = int(((3 *j4* k1^2* r* sin(theta0) *((-10* i* Jphi_te-17 *Jro_te)* cos(theta0)+(-14* i* Jphi_te-7 *Jro_te)* cos(3 *theta0)+Jz_te* (3 *sin(theta0)+7 *sin(3 *theta0))))/(32 *sqrt(2 *pi))))*Kronecker(M,2)*2*pi
    b42_tm = int(((3 *j4* k1^2* r* sin(theta0) *((-10* i* Jphi_tm-17 *Jro_tm)* cos(theta0)+(-14* i* Jphi_tm-7 *Jro_tm)* cos(3 *theta0)+Jz_tm* (3 *sin(theta0)+7 *sin(3 *theta0))))/(32 *sqrt(2 *pi))))*Kronecker(M,2)*2*pi
    b43_te = int(3/32* j4* k1^2 *sqrt(7/pi)* r* sin(theta0)^2 *(-2 *i *Jphi_te-3 *Jro_te+(-4 *i *Jphi_te-3* Jro_te) *cos(2 *theta0)+3 *Jz_te* sin(2* theta0)))*Kronecker(M,3)*2*pi
    b43_tm = int(3/32* j4* k1^2 *sqrt(7/pi)* r* sin(theta0)^2 *(-2 *i *Jphi_tm-3 *Jro_tm+(-4 *i *Jphi_tm-3* Jro_tm) *cos(2 *theta0)+3 *Jz_tm* sin(2* theta0)))*Kronecker(M,3)*2*pi
    b44_te = int(3/8* j4* k1^2 *sqrt(7/(2 *pi))* r* sin(theta0)^3 *((-i *Jphi_te-Jro_te)* cos(theta0)+Jz_te* sin(theta0)))*Kronecker(M,4)*2*pi
    b44_tm = int(3/8* j4* k1^2 *sqrt(7/(2 *pi))* r* sin(theta0)^3 *((-i *Jphi_tm-Jro_tm)* cos(theta0)+Jz_tm* sin(theta0)))*Kronecker(M,4)*2*pi
  var13 "scattering"
    sigma_ed_te = Z0_const/k1^2*(abs(a11_te)^2 + abs(a10_te)^2 + abs(a1m1_te)^2)/(1/(2*Z0_const))/abs(Ete)^2/2
    sigma_ed_tm = Z0_const/k1^2*(abs(a11_tm)^2 + abs(a10_tm)^2 + abs(a1m1_tm)^2)/(1/(2*Z0_const))/abs(Etm)^2/2
    sigma_eq_te = Z0_const/k1^2*(abs(a22_te)^2 + abs(a21_te)^2 + abs(a20_te)^2+abs(a2m1_te)^2 + abs(a2m2_te)^2)/(1/(2*Z0_const))/abs(Ete)^2/2
    sigma_eq_tm = Z0_const/k1^2*(abs(a22_tm)^2 + abs(a21_tm)^2 + abs(a20_tm)^2+abs(a2m1_tm)^2 + abs(a2m2_tm)^2)/(1/(2*Z0_const))/abs(Etm)^2/2
    sigma_eo_te = Z0_const/k1^2*(abs(a33_te)^2 + abs(a32_te)^2 + abs(a31_te)^2+abs(a30_te)^2 + abs(a3m1_te)^2 + abs(a3m2_te)^2 + abs(a3m3_te)^2)/(1/(2*Z0_const))/abs(Ete)^2/2
    sigma_eo_tm = Z0_const/k1^2*(abs(a33_tm)^2 + abs(a32_tm)^2 + abs(a31_tm)^2+abs(a30_tm)^2 + abs(a3m1_tm)^2 + abs(a3m2_tm)^2 + abs(a3m3_tm)^2)/(1/(2*Z0_const))/abs(Etm)^2/2
    sigma_e4th_te = Z0_const/k1^2*(abs(a44_te)^2+abs(a43_te)^2 + abs(a42_te)^2 + abs(a41_te)^2+abs(a40_te)^2 + abs(a4m1_te)^2 + abs(a4m2_te)^2 + abs(a4m3_te)^2 + abs(a4m4_te)^2)/(1/(2*Z0_const))/abs(Ete)^2/2
    sigma_e4th_tm = Z0_const/k1^2*(abs(a44_tm)^2+abs(a43_tm)^2 + abs(a42_tm)^2 + abs(a41_tm)^2+abs(a40_tm)^2 + abs(a4m1_tm)^2 + abs(a4m2_tm)^2 + abs(a4m3_tm)^2 + abs(a4m4_tm)^2)/(1/(2*Z0_const))/abs(Etm)^2/2
    sigma_md_te = Z0_const/k1^2*(abs(b11_te)^2 + abs(b10_te)^2 + abs(b1m1_te)^2)/(1/(2*Z0_const))/abs(Ete)^2/2
    sigma_md_tm = Z0_const/k1^2*(abs(b11_tm)^2 + abs(b10_tm)^2 + abs(b1m1_tm)^2)/(1/(2*Z0_const))/abs(Etm)^2/2
    sigma_mq_te = Z0_const/k1^2*(abs(b22_te)^2 + abs(b21_te)^2 + abs(b20_te)^2+abs(b2m1_te)^2 + abs(b2m2_te)^2)/(1/(2*Z0_const))/abs(Ete)^2/2
    sigma_mq_tm = Z0_const/k1^2*(abs(b22_tm)^2 + abs(b21_tm)^2 + abs(b20_tm)^2+abs(b2m1_tm)^2 + abs(b2m2_tm)^2)/(1/(2*Z0_const))/abs(Ete)^2/2
    sigma_mo_te = Z0_const/k1^2*(abs(b33_te)^2 + abs(b32_te)^2 + abs(b31_te)^2+abs(b30_te)^2 + abs(b3m1_te)^2 + abs(b3m2_te)^2 + abs(b3m3_te)^2)/(1/(2*Z0_const))/abs(Ete)^2/2
    sigma_mo_tm = Z0_const/k1^2*(abs(b33_tm)^2 + abs(b32_tm)^2 + abs(b31_tm)^2+abs(b30_tm)^2 + abs(b3m1_tm)^2 + abs(b3m2_tm)^2 + abs(b3m3_tm)^2)/(1/(2*Z0_const))/abs(Etm)^2/2
    sigma_m4th_te = Z0_const/k1^2*(abs(b44_te)^2+abs(b43_te)^2 + abs(b42_te)^2 + abs(b41_te)^2+abs(b40_te)^2 + abs(b4m1_te)^2 + abs(b4m2_te)^2 + abs(b4m3_te)^2 + abs(b4m4_te)^2)/(1/(2*Z0_const))/abs(Ete)^2/2
    sigma_m4th_tm = Z0_const/k1^2*(abs(b44_tm)^2+abs(b43_tm)^2 + abs(b42_tm)^2 + abs(b41_tm)^2+abs(b40_tm)^2 + abs(b4m1_tm)^2 + abs(b4m2_tm)^2 + abs(b4m3_tm)^2 + abs(b4m4_tm)^2)/(1/(2*Z0_const))/abs(Etm)^2/2
    I_in = (1/(2*Z0_const))*abs(Ete)^2
    sigma_sc_tm = int_surf(2*pi*r*(abs(ewfd.relPoavr*nr)+abs(ewfd.relPoavz*nz)))/I_in
    sigma_sc_full_te = sigma_ed_te+sigma_md_te+sigma_eq_te+sigma_mq_te+sigma_eo_te+sigma_mo_te+sigma_e4th_te+sigma_m4th_te
    sigma_sc_full_tm = sigma_ed_tm+sigma_md_tm+sigma_eq_tm+sigma_mq_tm+sigma_eo_tm+sigma_mo_tm+sigma_e4th_tm+sigma_m4th_tm
    sigma_sc_te = int_surf(2*pi*r*(abs(ewfd2.relPoavr*nr)+abs(ewfd2.relPoavz*nz)))/I_in
  var_full_fields "full fields"
    Er_full = sum(withsol('sol1', ewfd.Er, setval(M,mm))*exp(i*mm*phi_cut), mm, -4, 4)
    Ephi_full = sum(withsol('sol1', ewfd.Ephi, setval(M,mm))*exp(i*mm*phi_cut), mm, -4, 4)
    Ez_full = sum(withsol('sol1', ewfd.Ez, setval(M,mm))*exp(i*mm*phi_cut), mm, -4, 4)
    Ex_full = Er_full*cos(phi_cut) - Ephi_full*sin(phi_cut)
    Ey_full = Er_full*sin(phi_cut) + Ephi_full*cos(phi_cut)
    Eabs_full = sqrt(abs(Ex_full)^2 + abs(Ey_full)^2 + abs(Ez_full)^2)
    E2r_full = sum(withsol('sol1', ewfd2.Er, setval(M,mm))*exp(i*mm*phi_cut), mm, -4, 4)
    E2phi_full = sum(withsol('sol1', ewfd2.Ephi, setval(M,mm))*exp(i*mm*phi_cut), mm, -4, 4)
    E2z_full = sum(withsol('sol1', ewfd2.Ez, setval(M,mm))*exp(i*mm*phi_cut), mm, -4, 4)
    E2x_full = E2r_full*cos(phi_cut) - E2phi_full*sin(phi_cut)
    E2y_full = E2r_full*sin(phi_cut) + E2phi_full*cos(phi_cut)
    E2abs_full = sqrt(abs(E2x_full)^2 + abs(E2y_full)^2 + abs(E2z_full)^2)

Couplings
  intop1: Integration "Integration_volume" on domains 3, 4 | opname = int; intorder = 6
  intop2: Integration "Integration_surface" on boundaries 15, 16 | opname = int_surf; intorder = 6

Coordinate systems
  pml1: PML "Perfectly Matched Layer 1" on domains 1, 6

Geometry
  geom1 "Geometry 1" (2D axisymmetric, length unit m)
    c1: Circle | r = r_air+pml; angle = 90; rot = -90; layername = Layer 1; layer = pml; iscircularsectorold = on
    c2: Circle | r = r_air+pml; angle = 90; layername = Layer 1; layer = pml; iscircularsectorold = on
    pol1: Polygon
      source = table
      table = 
        {0.0[nm], -400.0[nm]}
        {272.604395144[nm], -400.0[nm]}
        {272.604395144[nm], -320.0[nm]}
        {306.1121560247948[nm], -320.0[nm]}
        {306.1121560247948[nm], -240.0[nm]}
        {264.140208009[nm], -240.0[nm]}
        {264.140208009[nm], -160.0[nm]}
        {280.2631970940636[nm], -160.0[nm]}
        {280.2631970940636[nm], -80.0[nm]}
        {340.582265211[nm], -80.0[nm]}
        {340.582265211[nm], 0.0[nm]}
        {252.4377648363244[nm], 0.0[nm]}
        {252.4377648363244[nm], 80.0[nm]}
        {273.8860298009647[nm], 80.0[nm]}
        {273.8860298009647[nm], 160.0[nm]}
        {271.393569472[nm], 160.0[nm]}
        {271.393569472[nm], 240.0[nm]}
        {337.1886367324454[nm], 240.0[nm]}
        {337.1886367324454[nm], 320.0[nm]}
        {304.9614062104433[nm], 320.0[nm]}
        {304.9614062104433[nm], 400.0[nm]}
        {0.0[nm], 400.0[nm]}
    fin: Finalize "Form Union"

Materials
  mat1: Common "Material 1" on domains 5, 6
    RefractiveIndex: RefractiveIndex
      n = n1
      ki = 0
  mat2: Common "Material 2" on domains 1, 2
    RefractiveIndex: RefractiveIndex
      n = n2
      ki = 0
  mat3: Common "Material 3" on domains 3, 4
    RefractiveIndex: RefractiveIndex
      n = n_m(lambda_w)
      ki = k_m(lambda_w)

Physics
  ewfd2: ElectromagneticWavesFrequencyDomain "Electromagnetic Waves, Frequency Domain TE" on all domains
    dependent variable E = {Er, Ephi, Ez}
    BackgroundField.SolveFor = scatteredField
    BackgroundField.Eb = {Er_te, Ephi_te, Ez_te}
    outofplanewavenumber.mFloquet = M
    wee1: WaveEquationElectric (default)
    axi1: AxialSymmetry (default)
    pec1: PerfectElectricConductor (default)
    init1: init "Initial Values 1" (default)
  ewfd: ElectromagneticWavesFrequencyDomain "Electromagnetic Waves, Frequency Domain 2 TM" (disabled) on all domains
    dependent variable E2 = {E2r, E2phi, E2z}
    BackgroundField.SolveFor = scatteredField
    BackgroundField.Eb = {Er_tm, Ephi_tm, Ez_tm}
    outofplanewavenumber.mFloquet = M
    wee1: WaveEquationElectric (default)
    axi1: AxialSymmetry (default)
    pec1: PerfectElectricConductor (default)
    init1: init "Initial Values 1" (default)

Mesh
  mesh1 "Mesh 1"
    size: MeshSizeDefault | hmax = 1.9380E-7; hmin = 4.1600E-10; hcurve = 0.25; hgrad = 1.2; hauto = 2; custom = on
    dis1: Distribution on boundaries 1, 9, 13
    ftri1: FreeTri "Free Triangular 1" on domains 2, 5
      size1: Size on domains 2, 5 | hmax = 3.2E-8; hmin = 2.96E-11; hauto = 2; custom = on
    map1: Map "Mapped 1" on domains 1, 6 | adjustedgdistr = on; smoothcontrol = on
    ftri2: FreeTri "Free Triangular 2" on domains 3, 4
      size1: Size on domains 3, 4 | hmax = 1.95E-8; hmin = 2.9E-11; hauto = 1; custom = on

Studies
  std1 "Scattering"
    param: Parametric "Parametric Sweep" | pname = M; plistarr = range(-4,1,4); punit = m
    freq: Frequency "Frequency Domain" | punit = THz; plist = nu

Solver configurations
  sol1 "Solution 1" (study std1)
    v1: Variables "Dependent Variables 1"
    s1: Stationary "Stationary Solver 1" | stol = 0.01
      p1: Parametric | pname = freq; plistarr = nu; punit = THz; pcontinuationmode = no
      fc1: FullyCoupled | linsolver = d1
      d1: Direct "Suggested Direct Solver (ewfd) (merged)"

Datasets
  dset1: Solution | solution = sol1
  rev1: Revolve2D "Revolution 2D 1" | data = dset1; startangle = -90; revangle = 225

Derived values
  gev1: EvalGlobal "TE"
    data = dset1
    table = new
    expr = {sigma_ed_te, sigma_eq_te, sigma_eo_te, sigma_e4th_te, sigma_md_te, sigma_mq_te, sigma_mo_te, sigma_m4th_te, sigma_sc_te, sigma_sc_full_te}
    unit = {m^2, m^2, m^2, m^2, m^2, m^2, m^2, m^2, m^2, m^2}
  gev2: EvalGlobal "TM"
    data = dset1
    expr = {sigma_ed_tm, sigma_eq_tm, sigma_eo_tm, sigma_e4th_tm, sigma_md_tm, sigma_mq_tm, sigma_mo_tm, sigma_m4th_tm, sigma_sc_tm, sigma_sc_full_tm}

Plots
  pg1: PlotGroup2D "Electric Field (ewfd2)" | data = dset1; dataisaxisym = on
    surf1: Surface | expr = ewfd2.normE
  pg2: PlotGroup2D "Electric Field (ewfd)" | data = dset1; dataisaxisym = on
    surf1: Surface | expr = ewfd.normE